// SBML level 3 version 1

model Jones2013_1()
  // model units - substance: mg, time: hr, volume: litre, area: m2, length: m, extent: mg

  // Compartments:
  compartment Vsp; Vsp has litre; Vsp is "spleen";
  compartment Vli; Vli has litre; Vli is "liver";
  compartment Var; Var has litre; Var is "arterial blood";
  compartment Vte; Vte has litre; Vte is "testes";
  compartment Vbr; Vbr has litre; Vbr is "brain";
  compartment Vbo; Vbo has litre; Vbo is "bone";
  compartment Vplas_ven; Vplas_ven has litre; Vplas_ven is "venous_plasma";
  compartment Vad; Vad has litre; Vad is "adipose";
  compartment Vmu; Vmu has litre; Vmu is "muscle";
  compartment Vki; Vki has litre; Vki is "kidney";
  compartment Vplas_art; Vplas_art has litre; Vplas_art is "arterial_plasma";
  compartment Vre; Vre has litre; Vre is "rest of body";
  compartment Vgu; Vgu has litre; Vgu is "gut";
  compartment Vhe; Vhe has litre; Vhe is "heart";
  compartment Vpl; Vpl has litre; Vpl is "plasma";
  compartment Vve; Vve has litre; Vve is "venous blood";
  compartment Vsk; Vsk has litre; Vsk is "skin";
  compartment Vlu; Vlu has litre; Vlu is "lung";
  compartment Vrb; Vrb has litre; Vrb is "erythrocytes";

  // Parameters:
  HLM_CLint = 10 mulitre_per_min_mg; HLM_CLint is "HLM CLint apparent [mul/min/mg]";
  FQsk = 0.05 dimensionless; FQsk is "skin fractional tissue blood flow";
  FVte = 0.01 litre_per_kg; FVte is "testes fractional tissue volume";
  FQte = 0.01076 dimensionless; FQte is "testes fractional tissue blood flow";
  FQki = 0.19 dimensionless; FQki is "kidney fractional tissue blood flow";
  Kpgu = 1 dimensionless; Kpgu is "gut tissue plasma partition coefficient";
  FVve = 0.0514 litre_per_kg; FVve is "venous fractional tissue volume";
  FQre = 0.103855 dimensionless; FQre is "rest of body fractional tissue blood flow";
  FQad = 0.05 dimensionless; FQad is "adipose fractional tissue blood flow";
  FVmu = 0.4 litre_per_kg; FVmu is "muscle fractional tissue volume";
  BW = 70 kg; BW is "body weight";
  BP = 1 dimensionless; BP is "blood to plasma ratio";
  Kpad = 1 dimensionless; Kpad is "adipose tissue plasma partition coefficient";
  FVki = 0.0044 litre_per_kg; FVki is "kidney fractional tissue volume";
  FVre = 0.099771 litre_per_kg; FVre is "rest of body fractional tissue volume";
  FVpl = 0.0424 litre_per_kg; FVpl is "plasma fractional tissue volume";
  FQmu = 0.17 dimensionless; FQmu is "muscle fractional tissue blood flow";
  Kpbr = 1 dimensionless; Kpbr is "brain tissue plasma partition coefficient";
  FVbo = 0.085629 litre_per_kg; FVbo is "bone fractional tissue volume";
  FQh = 0.215385 dimensionless; FQh is "hepatic (venous side) fractional tissue blood flow";
  fumic = 1 dimensionless; fumic is "fraction unbound in microsomes";
  FVrb = 0.0347 litre_per_kg; FVrb is "erythrocytes fractional tissue volume";
  FQbo = 0.05 dimensionless; FQbo is "bone fractional tissue blood flow";
  Kplu = 1 dimensionless; Kplu is "lung tissue plasma partition coefficient";
  Kpsk = 1 dimensionless; Kpsk is "skin tissue plasma partition coefficient";
  Kpli = 1 dimensionless; Kpli is "liver tissue plasma partition coefficient";
  Kpsp = 1 dimensionless; Kpsp is "spleen tissue plasma partition coefficient";
  FQbr = 0.12 dimensionless; FQbr is "brain fractional tissue blood flow";
  FVbr = 0.02 litre_per_kg; FVbr is "brain fractional tissue volume";
  PODOSE = 100 mg; PODOSE is "oral bolus dose [mg]";
  MPPGL = 45 mg_per_g; MPPGL is "mg microsomal protein per g liver";
  FQhe = 0.04 dimensionless; FQhe is "heart fractional tissue blood flow";
  CO = 108.33 ml_per_s; CO is "cardiac output [ml/s]";
  D = PODOSE; D has mg; D is "oral dose [mg]";
  F = 1 dimensionless; F is "fraction absorbed";
  FVsp = 0.0026 litre_per_kg; FVsp is "spleen fractional tissue volume";
  FVli = 0.021 litre_per_kg; FVli is "liver fractional tissue volume";
  FVhe = 0.0047 litre_per_kg; FVhe is "heart fractional tissue volume";
  CLrenal = 0 litre_per_hr; CLrenal is "CLint renal [L/hr]";
  FVlu = 0.0076 litre_per_kg; FVlu is "lung fractional tissue volume";
  FVsk = 0.0371 litre_per_kg; FVsk is "skin fractional tissue volume";
  Kphe = 1 dimensionless; Kphe is "heart tissue plasma partition coefficient";
  Ave = IVDOSE; Ave has mg;
  Kpbo = 1 dimensionless; Kpbo is "bone tissue plasma partition coefficient";
  FQsp = 0.017231 dimensionless; FQsp is "spleen fractional tissue blood flow";
  FQlu = 1 dimensionless; FQlu is "lung fractional tissue blood flow";
  IVDOSE = 0 mg; IVDOSE is "IV bolus dose [mg]";
  Kpre = 1 dimensionless; Kpre is "rest of body tissue plasma partition coefficient";
  Kpki = 1 dimensionless; Kpki is "kidney tissue plasma partition coefficient";
  fup = 1 dimensionless; fup is "fraction unbound in plasma";
  FVad = 0.213 litre_per_kg; FVad is "adipose fractional tissue volume";
  Kpmu = 1 dimensionless; Kpmu is "muscle tissue plasma partition coefficient";
  FVgu = 0.0171 litre_per_kg; FVgu is "gut fractional tissue volume";
  FVar = 0.0257 litre_per_kg; FVar is "arterial fractional tissue volume";
  QC has litre_per_hr; QC is "cardiac output [L/hr]";
  Kpte = 1 dimensionless; Kpte is "testes tissue plasma partition coefficient";
  Ka = 1 per_hr; Ka is "Ka [1/hr] absorption";
  FQgu = 0.146462 dimensionless; FQgu is "gut fractional tissue blood flow";
  Aad = 0 mg; Aad has mg;
  Ate = 0 mg; Ate has mg;
  Ali = 0 mg; Ali has mg;
  Ahe = 0 mg; Ahe has mg;
  Aki = 0 mg; Aki has mg;
  Abo = 0 mg; Abo has mg;
  Abr = 0 mg; Abr has mg;
  Asp = 0 mg; Asp has mg;
  Are = 0 mg; Are has mg;
  Aar = 0 mg; Aar has mg;
  Ask = 0 mg; Ask has mg;
  Agu = 0 mg; Agu has mg;
  Alu = 0 mg; Alu has mg;
  Amu = 0 mg; Amu has mg;
  Che has mg_per_litre; Che is "C [mg/l] heart";
  Csk has mg_per_litre; Csk is "C [mg/l] skin";
  Absorption has mg_per_hr;
  Qgu has litre_per_hr; Qgu is "gut blood flow";
  Cli_free has mg_per_litre; Cli_free is "free liver concentration";
  Clu has mg_per_litre; Clu is "C [mg/l] lung";
  Cpl_ve has mg_per_litre;
  Csp has mg_per_litre; Csp is "C [mg/l] spleen";
  Cli has mg_per_litre; Cli is "C [mg/l] liver";
  Qsk has litre_per_hr; Qsk is "skin blood flow";
  Qlu has litre_per_hr; Qlu is "lung blood flow";
  Qha has litre_per_hr; Qha is "hepatic artery blood flow";
  Qhe has litre_per_hr; Qhe is "heart blood flow";
  Qbo has litre_per_hr; Qbo is "bone blood flow";
  Qbr has litre_per_hr; Qbr is "brain blood flow";
  Car has mg_per_litre; Car is "C [mg/l] arterial blood";
  Venous has mg_per_hr;
  Cte has mg_per_litre; Cte is "C [mg/l] testes";
  Cki has mg_per_litre; Cki is "C [mg/l] kidney";
  Cre has mg_per_litre; Cre is "C [mg/l] rest of body";
  Qh has litre_per_hr; Qh is "hepatic (venous side) blood flow";
  Cmu has mg_per_litre; Cmu is "C [mg/l] muscle";
  Cve has mg_per_litre; Cve is "C [mg/l] venous blood";
  Cad has mg_per_litre; Cad is "C [mg/l] adipose";
  Qki has litre_per_hr; Qki is "kidney blood flow";
  Cki_free has mg_per_litre; Cki_free is "free kidney concentration";
  Qre has litre_per_hr; Qre is "rest of body blood flow";
  Qad has litre_per_hr; Qad is "adipose blood flow";
  Cgu has mg_per_litre; Cgu is "C [mg/l] gut";
  Qmu has litre_per_hr; Qmu is "muscle blood flow";
  Cbo has mg_per_litre; Cbo is "C [mg/l] bone";
  Cbr has mg_per_litre; Cbr is "C [mg/l] brain";
  Qte has litre_per_hr; Qte is "testes blood flow";
  Qsp has litre_per_hr; Qsp is "spleen blood flow";
  CLmet has litre_per_hr; CLmet is "CLint scaled [l/hr]";

  // Assignment rules:
  Vsp := 1 litre;
  Vli := 1 litre;
  Var := 1 litre;
  Vte := 1 litre;
  Vbr := 1 litre;
  Vbo := 1 litre;
  Vplas_ven := 1 litre;
  Vad := 1 litre;
  Vmu := 1 litre;
  Vki := 1 litre;
  Vplas_art := 1 litre;
  Vre := 1 litre;
  Vgu := 1 litre;
  Vhe := 1 litre;
  Vpl := 1 litre;
  Vve := 1 litre;
  Vsk := 1 litre;
  Vlu := 1 litre;
  Vrb := 1 litre;
  Che := Ahe/Vhe;
  Csk := Ask/Vsk;
  Absorption := Ka*D*F;
  Qgu := QC*FQgu;
  Cli_free := Cli*fup;
  Clu := Alu/Vlu;
  Cpl_ve := Cve/BP;
  Csp := Asp/Vsp;
  Cli := Ali/Vli;
  Qsk := QC*FQsk;
  Qlu := QC*FQlu;
  Qha := Qh - Qgu - Qsp;
  Qhe := QC*FQhe;
  Qbo := QC*FQbo;
  Qbr := QC*FQbr;
  Car := Aar/Var;
  Venous := Qad*(Cad/Kpad)*BP + Qbo*(Cbo/Kpbo)*BP + Qbr*(Cbr/Kpbr)*BP + Qhe*(Che/Kphe)*BP + Qki*(Cki/Kpki)*BP + Qh*(Cli/Kpli)*BP + Qmu*(Cmu/Kpmu)*BP + Qsk*(Csk/Kpsk)*BP + Qte*(Cte/Kpte)*BP + Qre*(Cre/Kpre)*BP;
  Cte := Ate/Vte;
  Cki := Aki/Vki;
  Cre := Are/Vre;
  Qh := QC*FQh;
  Cmu := Amu/Vmu;
  Cve := Ave/Vve;
  Cad := Aad/Vad;
  Qki := QC*FQki;
  Cki_free := Cki*fup;
  Qre := QC*FQre;
  Qad := QC*FQad;
  Cgu := Agu/Vgu;
  Qmu := QC*FQmu;
  Cbo := Abo/Vbo;
  Cbr := Abr/Vbr;
  QC := CO/1000*60*60;
  Qte := QC*FQte;
  Qsp := QC*FQsp;
  CLmet := HLM_CLint/fumic*MPPGL*Vli*60/1000;

  // Rate rules:
  Aad' = Qad*(Car - Cad/Kpad*BP);
  Ate' = Qte*(Car - Cte/Kpte*BP);
  D' = -Absorption;
  Ali' = Qha*Car + Qgu*(Cgu/Kpgu)*BP + Qsp*(Csp/Kpsp)*BP - Qh*(Cli/Kpli)*BP - Cli_free*CLmet;
  Ahe' = Qhe*(Car - Che/Kphe*BP);
  Aki' = Qki*(Car - Cki/Kpki*BP) - CLrenal*Cki_free;
  Abo' = Qbo*(Car - Cbo/Kpbo*BP);
  Abr' = Qbr*(Car - Cbr/Kpbr*BP);
  Asp' = Qsp*(Car - Csp/Kpsp*BP);
  Are' = Qre*(Car - Cre/Kpre*BP);
  Aar' = Qlu*(Clu/Kplu)*BP - Qlu*Car;
  Ask' = Qsk*(Car - Csk/Kpsk*BP);
  Ave' = Venous - Qlu*Cve;
  Agu' = Absorption + Qgu*(Car - Cgu/Kpgu*BP);
  Alu' = Qlu*Cve - Qlu*(Clu/Kplu)*BP;
  Amu' = Qmu*(Car - Cmu/Kpmu*BP);

  // Unit definitions:
  unit mg = 1e-3 gram;
  unit kg = 1000 gram;
  unit mg_per_g = 1e-3 gram / gram;
  unit hr = 3600 second;
  unit litre_per_hr = litre / (3600 second);
  unit m = metre;
  unit litre_per_kg = litre / (1000 gram);
  unit per_hr = 1 / (3600 second);
  unit m2 = metre^2;
  unit mg_per_hr = 1e-3 gram / (3600 second);
  unit mg_per_litre = 1e-3 gram / litre;
end
