// SBML level 3 version 1

function max(x, y)
  piecewise(x, x > y, y);
end
max is "maximum of arguments";

function min(x, y)
  piecewise(x, x < y, y);
end
min is "minimum of arguments";

model Hepatic_glucose_1()
  // Koenig Human Glucose Metabolism
  // Description
  // This is a metabolism model of Human glucose metabolism in SBML format.
  // This model is described in the article:
  // Quantifying the contribution of the liver to glucose homeostasis: a detailed kinetic model of human hepatic glucose metabolism.
  // König M., Bulik S., Holzhütter HG.
  // PLoS Comput Biol. 2012;8(6)
  // Abstract:
  // Despite the crucial role of the liver in glucose homeostasis, a detailed mathematical model of human hepatic glucose metabolism is lacking so far. Here we present a detailed kinetic model of glycolysis, gluconeogenesis and glycogen metabolism in human hepatocytes integrated with the hormonal control of these pathways by insulin, glucagon and epinephrine. Model simulations are in good agreement with experimental data on (i) the quantitative contributions of glycolysis, gluconeogenesis, and glycogen metabolism to hepatic glucose production and hepatic glucose utilization under varying physiological states. (ii) the time courses of postprandial glycogen storage as well as glycogen depletion in overnight fasting and short term fasting (iii) the switch from net hepatic glucose production under hypoglycemia to net hepatic glucose utilization under hyperglycemia essential for glucose homeostasis (iv) hormone perturbations of hepatic glucose metabolism. Response analysis reveals an extra high capacity of the liver to counteract changes of plasma glucose level below 5 mM (hypoglycemia) and above 7.5 mM (hyperglycemia). Our model may serve as an important module of a whole-body model of human glucose metabolism and as a valuable tool for understanding the role of the liver in glucose homeostasis under normal conditions and in diseases like diabetes or glycogen storage diseases.
  // The content of this model has been carefully created in a manual research effort.
  // This file has been produced by Matthias Koenig.
  // Terms of use
  // Copyright © 2016 Matthias Koenig.
  // Redistribution and use of any part of this model, with or without modification, are permitted provided that the following conditions are met:
  // Redistributions of this SBML file must retain the above copyright notice, this list of conditions and the following disclaimer.
  // Redistributions in a different form must reproduce the above copyright notice, this list of conditions and the following disclaimer in the documentation and/or other materials provided with the distribution.
  // This model is distributed in the hope that it will be useful, but WITHOUT ANY WARRANTY; without even the implied warranty of MERCHANTABILITY or FITNESS FOR A PARTICULAR PURPOSE.
  // model units - substance: mole, time: s, volume: m3, area: m2, length: m, extent: mole

  // Compartments:
  compartment mm = 1 m2; mm has m2; mm is "mitochondrial membrane";  // 2-D
  compartment mito; mito has m3; mito is "mitochondrion";
  compartment ext; ext has m3; ext is "blood";
  compartment cyto; cyto has m3; cyto is "cytosol";
  compartment pm = 1 m2; pm has m2; pm is "plasma membrane";  // 2-D

  // Species:
  species gdp in cyto = 0.1; gdp is "GDP";
  species $h_mito in mito = 0; h_mito is "H+";
  species fru6p in cyto = 0.05; fru6p is "fructose-6 phosphate";
  species $acoa_mito in mito = 0.04; acoa_mito is "acetyl-coenzyme A";
  species $cit_mito in mito = 0.32; cit_mito is "citrate";
  species oaa_mito in mito = 0.01; oaa_mito is "oxaloacetate";
  species glyglc in cyto = 250; glyglc is "glycogen";
  species pyr_mito in mito = 0.1; pyr_mito is "pyruvate";
  species $co2_mito in mito = 5; co2_mito is "CO2";
  species $atp_mito in mito = 2.8; atp_mito is "ATP";
  species pp in cyto = 0.008; pp is "pyrophosphate";
  species $co2 in cyto = 5; co2 is "CO2";
  species fru26bp in cyto = 0.004; fru26bp is "fructose-2,6 bisphosphate";
  species udpglc in cyto = 0.38; udpglc is "UDP-glucose";
  species $adp in cyto = 0.8; adp is "ADP";
  species $glc_ext in ext = 3; glc_ext is "glucose";
  species bpg13 in cyto = 0.3; bpg13 is "1,3-bisphospho-glycerate";
  species $h2o in cyto = 0; h2o is "H2O";
  species glc1p in cyto = 0.012; glc1p is "glucose-1 phosphate";
  species gdp_mito in mito = 0.1; gdp_mito is "GDP";
  species gtp in cyto = 0.29; gtp is "GTP";
  species dhap in cyto = 0.03; dhap is "dihydroxyacetone phosphate";
  species $phos_mito in mito = 5; phos_mito is "phosphate";
  species pyr in cyto = 0.1; pyr is "pyruvate";
  species fru16bp in cyto = 0.02; fru16bp is "fructose-1,6 bisphosphate";
  species $h2o_mito in mito = 0; h2o_mito is "H20";
  species udp in cyto = 0.09; udp is "UDP";
  species $nadh in cyto = 0.00056; nadh is "NADH";
  species $nadh_mito in mito = 0.24; nadh_mito is "NADH";
  species lac in cyto = 0.5; lac is "lactate";
  species pg2 in cyto = 0.03; pg2 is "2-phosphoglycerate";
  species pg3 in cyto = 0.27; pg3 is "3-phosphoglycerate";
  species $amp in cyto = 0.16; amp is "AMP";
  species glc6p in cyto = 0.12; glc6p is "glucose-6 phosphate";
  species $phos in cyto = 5; phos is "phosphate";
  species pep in cyto = 0.15; pep is "phosphoenolpyruvate";
  species $nad in cyto = 1.22; nad is "NAD+";
  species grap in cyto = 0.1; grap is "glyceraldehyde 3-phosphate";
  species $h in cyto = 0; h is "H+";
  species glc in cyto = 5; glc is "glucose";
  species $coa_mito in mito = 0.055; coa_mito is "coenzyme A";
  species $nad_mito in mito = 0.98; nad_mito is "NAD+";
  species $adp_mito in mito = 0.8; adp_mito is "ADP";
  species utp in cyto = 0.27; utp is "UTP";
  species pep_mito in mito = 0.15; pep_mito is "phosphoenolpyruvate";
  species $atp in cyto = 2.8; atp is "ATP";
  species oaa in cyto = 0.01; oaa is "oxaloacetate";
  species $lac_ext in ext = 1.2; lac_ext is "lactate";
  species gtp_mito in mito = 0.29; gtp_mito is "GTP";

  // Parameters:
  x_epi3 = 3.1 mM;
  K_val = 0.1 dimensionless;
  x_glu4 = 6.4 dimensionless;
  x_epi1 = 6090 pM;
  epi_f = 0.8 dimensionless;
  f_ext = 10 dimensionless; f_ext is "external volume factor";
  fliver = 0.5833333 dimensionless; fliver is "parenchymal fraction liver";
  sec_per_min = 60 s_per_min; sec_per_min is "conversion";
  x_ins1 = 818.9 pM;
  x_ins3 = 8.6 mM;
  x_ins2 = 0 pM;
  x_glu3 = 3.01 mM;
  x_ins4 = 4.2 dimensionless;
  x_glu1 = 190 pM;
  V_cyto = 0.001 m3; V_cyto is "cytosolic volume";
  x_epi4 = 8.4 dimensionless;
  f_mito = 0.2 dimensionless; f_mito is "mitochondrial volume factor";
  x_epi2 = 100 pM;
  Vliver = 0.0015 m3; Vliver is "liver volume";
  bodyweight = 70 kg;
  x_glu2 = 37.9 pM;
  scale = 1/60; scale has dimensionless;
  V_mito = f_mito*V_cyto; V_mito has m3; V_mito is "mitochondrial volume";
  conversion_factor = fliver*Vliver/V_cyto*sec_per_min*1e3/bodyweight; conversion_factor has s_per_min_kg;
  f_gly = scale; f_gly has dimensionless;
  V_ext = f_ext*V_cyto; V_ext has m3; V_ext is "external volume";
  f_glyglc = scale; f_glyglc has dimensionless;
  K_glu has pM;
  gamma has dimensionless;
  gtp_tot has mM;
  nadh_mito_tot has mM;
  glu_norm has pM;
  ins_norm has pM;
  atp_tot has mM; atp_tot is "ATP balance";
  K_epi has pM;
  GLY has mumol_per_min_kg; GLY is "glycogenolysis/glycogen synthesis";
  HGP has mumol_per_min_kg; HGP is "Hepatic glucose production/utilization";
  nadh_tot has mM;
  epi_norm has pM;
  K_ins has pM;
  GNG has mumol_per_min_kg; GNG is "gluconeogenesis/glycolysis";
  epi has pM;
  utp_tot has mM;
  gtp_mito_tot has mM;
  ins has pM;
  glu has pM;
  atp_mito_tot has mM;
  GLUT2_keq = 1 dimensionless;
  GLUT2_k_glc = 42 mM;
  GLUT2_Vmax = 420 mole_per_s;
  GK_n_gkrp = 2 dimensionless;
  GK_k_glc1 = 15 mM;
  GK_k_fru6p = 0.01 mM;
  GK_b = 0.7 dimensionless;
  GK_n = 1.6 dimensionless;
  GK_k_glc = 7.5 mM;
  GK_k_atp = 0.26 mM;
  GK_Vmax = 25.2 mole_per_s;
  GK_gc_free has dimensionless;
  G6PASE_k_glc6p = 2 mM;
  G6PASE_Vmax = 18.9 mole_per_s;
  GPI_keq = 0.5170608 dimensionless;
  GPI_k_glc6p = 0.182 mM;
  GPI_k_fru6p = 0.071 mM;
  GPI_Vmax = 420 mole_per_s;
  G16PI_keq = 15.71755 dimensionless;
  G16PI_k_glc6p = 0.67 mM;
  G16PI_k_glc1p = 0.045 mM;
  G16PI_Vmax = 100 mole_per_s;
  UPGASE_keq = 0.3122376 dimensionless;
  UPGASE_k_utp = 0.563 mM;
  UPGASE_k_glc1p = 0.172 mM;
  UPGASE_k_udpglc = 0.049 mM;
  UPGASE_k_pp = 0.166 mM;
  UPGASE_Vmax = 80 mole_per_s;
  PPASE_k_pp = 0.005 mM;
  PPASE_Vmax = 2.4 mole_per_s;
  GS_C = 500 mM;
  GS_k1_max = 0.2 dimensionless;
  GSn_k1 = 0.224 mM2;
  GSp_k1 = 3.003 mM2;
  GSn_k2 = 0.1504 mM;
  GSp_k2 = 0.09029 mM;
  GS_Vmax = 13.2 mole_per_s;
  GSp_k_udpglc has mM;
  GSp has mole_per_s;
  GSn_k_udpglc has mM;
  GS_fs has dimensionless;
  GSn has mole_per_s;
  GP_keq = 0.2118265 per_mM;
  GPn_k_glyglc = 4.8 mM;
  GPp_k_glyglc = 2.7 mM;
  GPn_k_glc1p = 120 mM;
  GPp_k_glc1p = 2 mM;
  GPn_k_phos = 300 mM;
  GPp_k_phos = 5 mM;
  GPp_ki_glc = 5 mM;
  GPn_ka_amp = 1 mM;
  GPn_base_amp = 0.03 dimensionless;
  GPn_max_amp = 0.3 dimensionless;
  GP_Vmax = 6.8 mole_per_s;
  GPn_Vmax has mole_per_s;
  GPn has mole_per_s;
  GP_fmax has dimensionless;
  GPp has mole_per_s;
  GPp_Vmax has mole_per_s;
  NDKGTP_keq = 1 dimensionless;
  NDKGTP_k_atp = 1.33 mM;
  NDKGTP_k_adp = 0.042 mM;
  NDKGTP_k_gtp = 0.15 mM;
  NDKGTP_k_gdp = 0.031 mM;
  NDKGTP_Vmax = 0 mole_per_s;
  NDKUTP_keq = 1 dimensionless;
  NDKUTP_k_atp = 1.33 mM;
  NDKUTP_k_adp = 0.042 mM;
  NDKUTP_k_utp = 16 mM;
  NDKUTP_k_udp = 0.19 mM;
  NDKUTP_Vmax = 2940 mole_per_s;
  AK_keq = 0.2473901 dimensionless;
  AK_k_atp = 0.09 mM;
  AK_k_amp = 0.08 mM;
  AK_k_adp = 0.11 mM;
  AK_Vmax = 0 mole_per_s;
  PFK2n_n = 1.3 dimensionless;
  PFK2p_n = 2.1 dimensionless;
  PFK2n_k_fru6p = 0.016 mM;
  PFK2p_k_fru6p = 0.05 mM;
  PFK2n_k_atp = 0.28 mM;
  PFK2p_k_atp = 0.65 mM;
  PFK2_Vmax = 0.0042 mole_per_s;
  PFK2n has mole_per_s;
  PFK2p has mole_per_s;
  FBP2n_k_fru26bp = 0.01 mM;
  FBP2p_k_fru26bp = 0.0005 mM;
  FBP2n_ki_fru6p = 0.0035 mM;
  FBP2p_ki_fru6p = 0.01 mM;
  FBP2_Vmax = 0.126 mole_per_s;
  FBP2p has mole_per_s;
  FBP2n has mole_per_s;
  PFK1_k_atp = 0.111 mM;
  PFK1_k_fru6p = 0.077 mM;
  PFK1_ki_fru6p = 0.012 mM;
  PFK1_ka_fru26bp = 0.001 mM;
  PFK1_Vmax = 7.182 mole_per_s;
  FBP1_ki_fru26bp = 0.001 mM;
  FBP1_k_fru16bp = 0.0013 mM;
  FBP1_Vmax = 4.326 mole_per_s;
  ALD_keq = 9.762989e-5 mM;
  ALD_k_fru16bp = 0.0071 mM;
  ALD_k_dhap = 0.0364 mM;
  ALD_k_grap = 0.0071 mM;
  ALD_ki1_grap = 0.0572 mM;
  ALD_ki2_grap = 0.176 mM;
  ALD_Vmax = 420 mole_per_s;
  TPI_keq = 0.05447699 dimensionless;
  TPI_k_dhap = 0.59 mM;
  TPI_k_grap = 0.42 mM;
  TPI_Vmax = 420 mole_per_s;
  GAPDH_keq = 0.08677987 per_mM;
  GAPDH_k_nad = 0.05 mM;
  GAPDH_k_grap = 0.005 mM;
  GAPDH_k_phos = 3.9 mM;
  GAPDH_k_nadh = 0.0083 mM;
  GAPDH_k_bpg13 = 0.0035 mM;
  GAPDH_Vmax = 420 mole_per_s;
  PGK_keq = 6.958644 dimensionless;
  PGK_k_adp = 0.35 mM;
  PGK_k_atp = 0.48 mM;
  PGK_k_bpg13 = 0.002 mM;
  PGK_k_pg3 = 1.2 mM;
  PGK_Vmax = 420 mole_per_s;
  PGM_keq = 0.1813754 dimensionless;
  PGM_k_pg3 = 5 mM;
  PGM_k_pg2 = 1 mM;
  PGM_Vmax = 420 mole_per_s;
  EN_keq = 0.05447699 dimensionless;
  EN_k_pep = 1 mM;
  EN_k_pg2 = 1 mM;
  EN_Vmax = 35.994 mole_per_s;
  PKn_n = 3.5 dimensionless;
  PKp_n = 3.5 dimensionless;
  PKn_n_fbp = 1.8 dimensionless;
  PKp_n_fbp = 1.8 dimensionless;
  PKn_alpha = 1 dimensionless;
  PKp_alpha = 1.1 dimensionless;
  PKn_k_fbp = 0.00016 mM;
  PKp_k_fbp = 0.00035 mM;
  PKn_k_pep = 0.58 mM;
  PKp_k_pep = 1.1 mM;
  PKn_ba = 0.08 mM;
  PKp_ba = 0.04 mM;
  PK_ae = 1 dimensionless;
  PKn_k_pep_end = 0.08 mM;
  PK_k_adp = 2.3 mM;
  PK_Vmax = 46.2 mole_per_s;
  PKp has mole_per_s;
  PKp_alpha_inp has dimensionless;
  PKn_f has dimensionless;
  PKn_alpha_inp has dimensionless;
  PKn_pep_inp has mM;
  PKp_f has dimensionless;
  PKn has mole_per_s;
  PKp_pep_inp has mM;
  PEPCK_keq = 336.9565 mM;
  PEPCK_k_pep = 0.237 mM;
  PEPCK_k_gdp = 0.0921 mM;
  PEPCK_k_co2 = 25.5 mM;
  PEPCK_k_oaa = 0.0055 mM;
  PEPCK_k_gtp = 0.0222 mM;
  PEPCK_Vmax = 0 mole_per_s;
  PEPCKM_Vmax = 546 mole_per_s;
  PC_k_atp = 0.22 mM;
  PC_k_pyr = 0.22 mM;
  PC_k_co2 = 3.2 mM;
  PC_k_acoa = 0.015 mM;
  PC_n = 2.5 dimensionless;
  PC_Vmax = 168 mole_per_s;
  LDH_keq = 0.0002783211 dimensionless;
  LDH_k_pyr = 0.495 mM;
  LDH_k_lac = 31.98 mM;
  LDH_k_nad = 0.984 mM;
  LDH_k_nadh = 0.027 mM;
  LDH_Vmax = 12.6 mole_per_s;
  LACT_keq = 1 dimensionless;
  LACT_k_lac = 0.8 mM;
  LACT_Vmax = 5.418 mole_per_s;
  PYRTM_keq = 1 dimensionless;
  PYRTM_k_pyr = 0.1 mM;
  PYRTM_Vmax = 42 mole_per_s;
  PEPTM_keq = 1 dimensionless;
  PEPTM_k_pep = 0.1 mM;
  PEPTM_Vmax = 33.6 mole_per_s;
  PDH_k_pyr = 0.025 mM;
  PDH_k_coa = 0.013 mM;
  PDH_k_nad = 0.05 mM;
  PDH_ki_acoa = 0.035 mM;
  PDH_ki_nadh = 0.036 mM;
  PDHn_alpha = 5 dimensionless;
  PDHp_alpha = 1 dimensionless;
  PDH_Vmax = 13.44 mole_per_s;
  PDHp has mole_per_s;
  PDH_base has mole_per_s;
  PDHn has mole_per_s;
  CS_keq = 266599 dimensionless;
  CS_k_oaa = 0.002 mM;
  CS_k_acoa = 0.016 mM;
  CS_k_cit = 0.42 mM;
  CS_k_coa = 0.07 mM;
  CS_Vmax = 4.2 mole_per_s;
  NDKGTPM_keq = 1 dimensionless;
  NDKGTPM_k_atp = 1.33 mM;
  NDKGTPM_k_adp = 0.042 mM;
  NDKGTPM_k_gtp = 0.15 mM;
  NDKGTPM_k_gdp = 0.031 mM;
  NDKGTPM_Vmax = 420 mole_per_s;
  OAAFLX_Vmax = 0 mole_per_s;
  ACOAFLX_Vmax = 0 mole_per_s;
  CITFLX_Vmax = 0 mole_per_s;

  // Assignment rules:
  mito := V_mito;
  ext := V_ext;
  cyto := V_cyto;
  K_glu := (x_glu1 - x_glu2)*K_val;
  gamma := 0.5*(1 - ins_norm/(ins_norm + K_ins) + max(glu_norm/(glu_norm + K_glu), epi_f*epi_norm/(epi_norm + K_epi)));
  gtp_tot := gtp + gdp;
  nadh_mito_tot := nadh_mito + nad_mito;
  glu_norm := max(0 pM, glu - x_glu2);
  ins_norm := max(0 pM, ins - x_ins2);
  atp_tot := atp + adp + amp;
  K_epi := (x_epi1 - x_epi2)*K_val;
  GLY := -G16PI*conversion_factor;
  HGP := GLUT2*conversion_factor;
  nadh_tot := nadh + nad;
  epi_norm := max(0 pM, epi - x_epi2);
  K_ins := (x_ins1 - x_ins2)*K_val;
  GNG := GPI*conversion_factor;
  epi := x_epi2 + (x_epi1 - x_epi2)*(1 - glc_ext^x_epi4/(glc_ext^x_epi4 + x_epi3^x_epi4));
  utp_tot := utp + udp + udpglc;
  gtp_mito_tot := gtp_mito + gdp_mito;
  ins := x_ins2 + (x_ins1 - x_ins2)*glc_ext^x_ins4/(glc_ext^x_ins4 + x_ins3^x_ins4);
  glu := x_glu2 + (x_glu1 - x_glu2)*(1 - glc_ext^x_glu4/(glc_ext^x_glu4 + x_glu3^x_glu4));
  atp_mito_tot := atp_mito + adp_mito;
  GK_gc_free := glc^GK_n_gkrp/(glc^GK_n_gkrp + GK_k_glc1^GK_n_gkrp)*(1 - GK_b*fru6p/(fru6p + GK_k_fru6p));
  GSp_k_udpglc := GSp_k1/(glc6p + GSp_k2);
  GSp := f_glyglc*GS_Vmax*GS_fs*udpglc/(GSp_k_udpglc + udpglc);
  GSn_k_udpglc := GSn_k1/(glc6p + GSn_k2);
  GS_fs := (1 + GS_k1_max)*(GS_C - glyglc)/(GS_C - glyglc + GS_k1_max*GS_C);
  GSn := f_glyglc*GS_Vmax*GS_fs*udpglc/(GSn_k_udpglc + udpglc);
  GPn_Vmax := f_glyglc*GP_Vmax*GP_fmax*(GPn_base_amp + (GPn_max_amp - GPn_base_amp)*amp/(amp + GPn_ka_amp));
  GPn := GPn_Vmax/(GPn_k_glyglc*GPn_k_phos)*(glyglc*phos - glc1p/GP_keq)/((1 + glyglc/GPn_k_glyglc)*(1 + phos/GPn_k_phos) + 1 + glc1p/GPn_k_glc1p - 1);
  GP_fmax := (1 + GS_k1_max)*glyglc/(glyglc + GS_k1_max*GS_C);
  GPp := GPp_Vmax/(GPp_k_glyglc*GPp_k_phos)*(glyglc*phos - glc1p/GP_keq)/((1 + glyglc/GPp_k_glyglc)*(1 + phos/GPp_k_phos) + 1 + glc1p/GPp_k_glc1p - 1);
  GPp_Vmax := f_glyglc*GP_Vmax*GP_fmax*exp(-log10(2)/GPp_ki_glc*glc);
  PFK2n := f_gly*PFK2_Vmax*fru6p^PFK2n_n/(fru6p^PFK2n_n + PFK2n_k_fru6p^PFK2n_n)*atp/(atp + PFK2n_k_atp);
  PFK2p := f_gly*PFK2_Vmax*fru6p^PFK2p_n/(fru6p^PFK2p_n + PFK2p_k_fru6p^PFK2p_n)*atp/(atp + PFK2p_k_atp);
  FBP2p := f_gly*FBP2_Vmax/(1 + fru6p/FBP2p_ki_fru6p)*fru26bp/(FBP2p_k_fru26bp + fru26bp);
  FBP2n := f_gly*FBP2_Vmax/(1 + fru6p/FBP2n_ki_fru6p)*fru26bp/(FBP2n_k_fru26bp + fru26bp);
  PKp := f_gly*PK_Vmax*PKp_alpha_inp*pep^PKp_n/(PKp_pep_inp^PKp_n + pep^PKp_n)*adp/(adp + PK_k_adp)*(PKp_ba + (1 - PKp_ba)*PKp_f);
  PKp_alpha_inp := (1 - PKp_f)*(PKp_alpha - PK_ae) + PK_ae;
  PKn_f := fru16bp^PKn_n_fbp/(PKn_k_fbp^PKn_n_fbp + fru16bp^PKn_n_fbp);
  PKn_alpha_inp := (1 - PKn_f)*(PKn_alpha - PK_ae) + PK_ae;
  PKn_pep_inp := (1 - PKn_f)*(PKn_k_pep - PKn_k_pep_end) + PKn_k_pep_end;
  PKp_f := fru16bp^PKp_n_fbp/(PKp_k_fbp^PKp_n_fbp + fru16bp^PKp_n_fbp);
  PKn := f_gly*PK_Vmax*PKn_alpha_inp*pep^PKn_n/(PKn_pep_inp^PKn_n + pep^PKn_n)*adp/(adp + PK_k_adp)*(PKn_ba + (1 - PKn_ba)*PKn_f);
  PKp_pep_inp := (1 - PKp_f)*(PKp_k_pep - PKn_k_pep_end) + PKn_k_pep_end;
  PDHp := PDH_base*PDHp_alpha;
  PDH_base := f_gly*PDH_Vmax*pyr_mito/(pyr_mito + PDH_k_pyr)*nad_mito/(nad_mito + PDH_k_nad*(1 + nadh_mito/PDH_ki_nadh))*coa_mito/(coa_mito + PDH_k_coa*(1 + acoa_mito/PDH_ki_acoa));
  PDHn := PDH_base*PDHn_alpha;

  // Reactions:
  GLUT2: $glc_ext -> glc; f_gly*(GLUT2_Vmax/GLUT2_k_glc)*(glc_ext - glc/GLUT2_keq)/(1 + glc_ext/GLUT2_k_glc + glc/GLUT2_k_glc); GLUT2 is "GLUT2 glucose transporter";
  GK: glc + $atp => glc6p + $adp; f_gly*GK_Vmax*GK_gc_free*(atp/(GK_k_atp + atp))*(glc^GK_n/(glc^GK_n + GK_k_glc^GK_n)); GK is "Glucokinase";  // modifiers: glc1p, fru6p
  G6PASE: glc6p + $h2o => glc + $phos; f_gly*G6PASE_Vmax*(glc6p/(G6PASE_k_glc6p + glc6p)); G6PASE is "D-Glucose-6-phosphate Phosphatase";
  GPI: glc6p -> fru6p; f_gly*(GPI_Vmax/GPI_k_glc6p)*(glc6p - fru6p/GPI_keq)/(1 + glc6p/GPI_k_glc6p + fru6p/GPI_k_fru6p); GPI is "D-Glucose-6-phosphate Isomerase";
  G16PI: glc1p -> glc6p; f_glyglc*(G16PI_Vmax/G16PI_k_glc1p)*(glc1p - glc6p/G16PI_keq)/(1 + glc1p/G16PI_k_glc1p + glc6p/G16PI_k_glc6p); G16PI is "Glucose 1-phosphate 1,6-phosphomutase";
  UPGASE: utp + glc1p -> udpglc + pp; f_glyglc*UPGASE_Vmax/(UPGASE_k_utp*UPGASE_k_glc1p)*(utp*glc1p - udpglc*pp/UPGASE_keq)/((1 + utp/UPGASE_k_utp)*(1 + glc1p/UPGASE_k_glc1p) + (1 + udpglc/UPGASE_k_udpglc)*(1 + pp/UPGASE_k_pp) - 1); UPGASE is "UTP:Glucose-1-phosphate uridylyltransferase";
  PPASE: pp + $h2o => 2 $phos; f_glyglc*PPASE_Vmax*pp/(pp + PPASE_k_pp); PPASE is "Pyrophosphate phosphohydrolase";
  GS: udpglc => udp + glyglc; (1 - gamma)*GSn + gamma*GSp; GS is "Glycogen synthase";  // modifiers: glc6p
  GP: glyglc + $phos -> glc1p; (1 - gamma)*GPn + gamma*GPp; GP is "Glycogen-Phosphorylase";  // modifiers: amp, glc
  NDKGTP: $atp + gdp -> $adp + gtp; f_gly*NDKGTP_Vmax/(NDKGTP_k_atp*NDKGTP_k_gdp)*(atp*gdp - adp*gtp/NDKGTP_keq)/((1 + atp/NDKGTP_k_atp)*(1 + gdp/NDKGTP_k_gdp) + (1 + adp/NDKGTP_k_adp)*(1 + gtp/NDKGTP_k_gtp) - 1); NDKGTP is "Nucleoside-diphosphate kinase (ATP, GTP)";
  NDKUTP: $atp + udp -> $adp + utp; f_glyglc*NDKUTP_Vmax/(NDKUTP_k_atp*NDKUTP_k_udp)*(atp*udp - adp*utp/NDKUTP_keq)/((1 + atp/NDKUTP_k_atp)*(1 + udp/NDKUTP_k_udp) + (1 + adp/NDKUTP_k_adp)*(1 + utp/NDKUTP_k_utp) - 1); NDKUTP is "Nucleoside-diphosphate kinase (ATP, UTP)";
  AK: $atp + $amp -> 2 $adp; f_gly*AK_Vmax/(AK_k_atp*AK_k_amp)*(atp*amp - adp*adp/AK_keq)/((1 + atp/AK_k_atp)*(1 + amp/AK_k_amp) + (1 + adp/AK_k_adp)*(1 + adp/AK_k_adp) - 1); AK is "ATP:AMP phosphotransferase (Adenylatkinase)";
  PFK2: fru6p + $atp => fru26bp + $adp; (1 - gamma)*PFK2n + gamma*PFK2p; PFK2 is "ATP:D-fructose-6-phosphate 2-phosphotransferase";
  FBP2: fru26bp => fru6p + $phos; (1 - gamma)*FBP2n + gamma*FBP2p; FBP2 is "D-Fructose-2,6-bisphosphate 2-phosphohydrolase";
  PFK1: fru6p + $atp => fru16bp + $adp; f_gly*PFK1_Vmax*(1 - 1/(1 + fru26bp/PFK1_ka_fru26bp))*fru6p*atp/(PFK1_ki_fru6p*PFK1_k_atp + PFK1_k_fru6p*atp + PFK1_k_atp*fru6p + atp*fru6p); PFK1 is "ATP:D-fructose-6-phosphate 1-phosphotransferase";  // modifiers: fru26bp
  FBP1: fru16bp + $h2o => fru6p + $phos; f_gly*FBP1_Vmax/(1 + fru26bp/FBP1_ki_fru26bp)*fru16bp/(fru16bp + FBP1_k_fru16bp); FBP1 is "D-Fructose-1,6-bisphosphate 1-phosphohydrolase";  // modifiers: fru26bp
  ALD: fru16bp -> grap + dhap; f_gly*ALD_Vmax/ALD_k_fru16bp*(fru16bp - grap*dhap/ALD_keq)/(1 + fru16bp/ALD_k_fru16bp + grap/ALD_ki1_grap + dhap*(grap + ALD_k_grap)/(ALD_k_dhap*ALD_ki1_grap) + fru16bp*grap/(ALD_k_fru16bp*ALD_ki2_grap)); ALD is "Aldolase";
  TPI: dhap -> grap; f_gly*TPI_Vmax/TPI_k_dhap*(dhap - grap/TPI_keq)/(1 + dhap/TPI_k_dhap + grap/TPI_k_grap); TPI is "Triosephosphate Isomerase";
  GAPDH: grap + $phos + $nad => bpg13 + $nadh + $h; f_gly*GAPDH_Vmax/(GAPDH_k_nad*GAPDH_k_grap*GAPDH_k_phos)*(nad*grap*phos - bpg13*nadh/GAPDH_keq)/((1 + nad/GAPDH_k_nad)*(1 + grap/GAPDH_k_grap)*(1 + phos/GAPDH_k_phos) + (1 + nadh/GAPDH_k_nadh)*(1 + bpg13/GAPDH_k_bpg13) - 1); GAPDH is "D-Glyceraldehyde-3-phosphate:NAD+ oxidoreductase";
  PGK: $adp + bpg13 -> $atp + pg3; f_gly*PGK_Vmax/(PGK_k_adp*PGK_k_bpg13)*(adp*bpg13 - atp*pg3/PGK_keq)/((1 + adp/PGK_k_adp)*(1 + bpg13/PGK_k_bpg13) + (1 + atp/PGK_k_atp)*(1 + pg3/PGK_k_pg3) - 1); PGK is "Phosphoglycerate Kinase";
  PGM: pg3 -> pg2; f_gly*PGM_Vmax*(pg3 - pg2/PGM_keq)/(pg3 + PGM_k_pg3*(1 + pg2/PGM_k_pg2)); PGM is "2-Phospho-D-glycerate 2,3-phosphomutase";
  EN: pg2 -> pep; f_gly*EN_Vmax*(pg2 - pep/EN_keq)/(pg2 + EN_k_pg2*(1 + pep/EN_k_pep)); EN is "2-Phospho-D-glucerate hydro-lyase (enolase)";
  PK: pep + $adp => pyr + $atp; (1 - gamma)*PKn + gamma*PKp; PK is "Pyruvatkinase";  // modifiers: fru16bp
  PEPCK: oaa + gtp -> pep + gdp + $co2; f_gly*PEPCK_Vmax/(PEPCK_k_oaa*PEPCK_k_gtp)*(oaa*gtp - pep*gdp*co2/PEPCK_keq)/((1 + oaa/PEPCK_k_oaa)*(1 + gtp/PEPCK_k_gtp) + (1 + pep/PEPCK_k_pep)*(1 + gdp/PEPCK_k_gdp)*(1 + co2/PEPCK_k_co2) - 1); PEPCK is "PEPCK cyto";
  PEPCKM: oaa_mito + gtp_mito -> pep_mito + gdp_mito + $co2_mito; f_gly*PEPCKM_Vmax/(PEPCK_k_oaa*PEPCK_k_gtp)*(oaa_mito*gtp_mito - pep_mito*gdp_mito*co2_mito/PEPCK_keq)/((1 + oaa_mito/PEPCK_k_oaa)*(1 + gtp_mito/PEPCK_k_gtp) + (1 + pep_mito/PEPCK_k_pep)*(1 + gdp_mito/PEPCK_k_gdp)*(1 + co2_mito/PEPCK_k_co2) - 1); PEPCKM is "PEPCK mito";
  PC: $atp_mito + pyr_mito + $co2_mito => oaa_mito + $adp_mito + $phos_mito; f_gly*PC_Vmax*atp_mito/(PC_k_atp + atp_mito)*pyr_mito/(PC_k_pyr + pyr_mito)*co2_mito/(PC_k_co2 + co2_mito)*acoa_mito^PC_n/(acoa_mito^PC_n + PC_k_acoa^PC_n); PC is "Pyruvate Carboxylase";  // modifiers: acoa_mito
  LDH: pyr + $nadh -> lac + $nad; f_gly*LDH_Vmax/(LDH_k_pyr*LDH_k_nadh)*(pyr*nadh - lac*nad/LDH_keq)/((1 + nadh/LDH_k_nadh)*(1 + pyr/LDH_k_pyr) + (1 + lac/LDH_k_lac)*(1 + nad/LDH_k_nad) - 1); LDH is "Lactate Dehydrogenase";
  LACT: $lac_ext -> lac; f_gly*LACT_Vmax/LACT_k_lac*(lac_ext - lac/LACT_keq)/(1 + lac_ext/LACT_k_lac + lac/LACT_k_lac); LACT is "Lactate transport (import)";
  PYRTM: pyr => pyr_mito; f_gly*PYRTM_Vmax/PYRTM_k_pyr*(pyr - pyr_mito/PYRTM_keq)/(1 + pyr/PYRTM_k_pyr + pyr_mito/PYRTM_k_pyr); PYRTM is "Pyruvate transport (mito)";
  PEPTM: pep_mito => pep; f_gly*PEPTM_Vmax/PEPTM_k_pep*(pep_mito - pep/PEPTM_keq)/(1 + pep/PEPTM_k_pep + pep_mito/PEPTM_k_pep); PEPTM is "PEP Transport (export mito)";
  PDH: pyr_mito + $coa_mito + $nad_mito => $acoa_mito + $co2_mito + $nadh_mito + $h_mito; (1 - gamma)*PDHn + gamma*PDHp; PDH is "Pyruvate Dehydrogenase";
  CS: $acoa_mito + oaa_mito + $h2o_mito -> $cit_mito + $coa_mito; f_gly*CS_Vmax/(CS_k_oaa*CS_k_acoa)*(acoa_mito*oaa_mito - cit_mito*coa_mito/CS_keq)/((1 + acoa_mito/CS_k_acoa)*(1 + oaa_mito/CS_k_oaa) + (1 + cit_mito/CS_k_cit)*(1 + coa_mito/CS_k_coa) - 1); CS is "Citrate Synthase";
  NDKGTPM: $atp_mito + gdp_mito -> $adp_mito + gtp_mito; f_gly*NDKGTPM_Vmax/(NDKGTPM_k_atp*NDKGTPM_k_gdp)*(atp_mito*gdp_mito - adp_mito*gtp_mito/NDKGTPM_keq)/((1 + atp_mito/NDKGTPM_k_atp)*(1 + gdp_mito/NDKGTPM_k_gdp) + (1 + adp_mito/NDKGTPM_k_adp)*(1 + gtp_mito/NDKGTPM_k_gtp) - 1); NDKGTPM is "Nucleoside-diphosphate kinase (ATP, GTP) mito";
  OAAFLX: => oaa_mito; f_gly*OAAFLX_Vmax; OAAFLX is "oxalacetate influx";
  ACOAFLX: $acoa_mito => ; f_gly*ACOAFLX_Vmax; ACOAFLX is "acetyl-coa efflux";
  CITFLX: $cit_mito => ; f_gly*CITFLX_Vmax; CITFLX is "citrate efflux";

  // Unit definitions:
  unit pmol = 1e-12 mole;
  unit s_per_min_kg = second / (60 second * kilogram);
  unit per_mM = metre^3 / mole;
  unit min = 60 second;
  unit mM = mole / metre^3;
  unit m = metre;
  unit mM2 = mole^2 / metre^6;
  unit mumol_per_min_kg = 1e-6 mole / (60 second * kilogram);
  unit s = second;
  unit s_per_min = second / (60 second);
  unit m3 = metre^3;
  unit m2 = metre^2;
  unit kg = kilogram;
  unit mole_per_s = mole / second;
  unit per_s = 1 / second;
  unit pM = 1e-12 mole / litre;
end
